table  # each column defines a variable
    T (°C) | R (kΩ)
    4.8 | 123.6
    23 | 54.6
    35 | 31.6
    57 | 11.2
    76 | 7.5
    83 | 4.2
    95 | 3.5
    100 | 3.17
end table
Cf := expfit(T, R) = [4.81851e10 Ω; -0.0463587 1/K; 1577.6 Ω]
4.819*10^10*Ω
-0.046*K^-1
1.578*kΩ
T2 := -20 °C, -19 °C .. 130 °C
R2(T) := Cf[0]*exp(Cf[1]*T) + Cf[2]
# [plot: R (Ω), R2(T2) vs T (°C), T2 (°C)]
Rs := 33 kΩ
Rp := 12 kΩ
Rt(T) := (R2(T)^-1 + Rp^-1)^-1
U(T) := 3.3 V*Rt(T)/(Rs + Rt(T))
Count(T) := floor(U(T)*1024*V^-1)
# [plot: U(T2)*1024, Count(T2) vs T2 (°C)]
